// COMSOL Multiphysics 5.3.1.275 model "2d_controllability_batch_sim.mph"
// Outline of the model tree

Parameters
  H = 3[mm]*scale_volume*3  // ""
  W = 4[mm]*scale_volume*4  // ""
  h1 = 80e-3[mm]*scale_object  // ""
  D = 300e-3[mm]*scale_object  // ""
  fc40_s0 = 18.787[mN/m]  // ""
  fc40_c = 0.0862[mN/m/K]  // ""
  Q_full = 0.01[W]  // ""
  T0 = 298.15[K]  // ""
  rho0 = 1909[kg/m^3]  // ""
  alpha = 2.16[kg/m^3/K]/rho0  // ""
  L = W  // ""
  d_beam = D/10  // ""
  scale_volume = 1*scale
  scale_object = 1*scale
  tmax = 1 [s]
  N = 100
  dt = tmax/N
  scale = 1
  s_oil = 5.811[mN/m]
  c_oil = 0.0471[mN/m/K]
  fc40_rho0 = 1909[kg/m^3]
  fc40_rho_c = -2.16[kg/m^3/K]
  kf_rho25 = 915[kg/m^3]
  kf_rho_c25 = -0.99735[kg/m^3/K]
  conduct_therm = 0.065[W/m/K]
  water_s0 = 75.653e-3 [N/m]
  water_c = 0.1379e-3[N/K/m]
  water_c2 = 0.2712E-3[mN/m/K/K]
  viscos = 0.0041[Pa*s]
  Cp = 1100  // Parametric sweep value
  l = 5[mm]
  DL = D*1.00005
  epsilon = D/500
  power_dens = Q_full/D/D
  x0 = 3.0E-5[m]
  kf5_s0 = 21.4[mN/m]
  kf5_c = 0.0734[mN/m/K]
  kf20_s0 = 22.84[mN/m]
  kf20_c = 0.0796[mN/m/K]
  fc70_s0 = 20.319[mN/m]
  fc70_c = 0.0799[mN/m/K]
  novec7500_s0 = 16.938[mN/m]
  novec7500_c = 0.07206[mN/m/K]
  t_stab = 0 [s]
  vel = 0 [m/s]
  dis = x0
  hexadec_s0 = 29.11 [mN/m]
  hexadec_c = 0.0809 [mN/m/K]
  novec7200_s0 = 15.866 [mN/m]
  novec7200_c = 0.0891 [mN/m/K]
  decane_s0 = 26.341 [mN/m]
  decane_c = 0.0943 [mN/m/K]

Functions
  rect1: Rectangle "Heater 1" | funcname = rectl; lower = -(DL/2+d_beam)/1[m]; upper = -DL/2/1[m]; smooth = 1e-7; ncontder = 1
  rect2: Rectangle "Heater 2" | funcname = rectr; lower = (DL/2)/1[m]; upper = (DL/2+d_beam)/1[m]; smooth = 1e-7; ncontder = 1
  step1: Step | location = 1; from = 1; to = 0; smooth = 0.0001; ncontder = 1

Variables
  var1 "Variables 1"
    m = int_obj(D*mat3.def.rho)
    Ft = int_bound(D*tpfmm.T_stressx)
    Fs = intop1(D*tpfmm.sigma*root.nx)
    a = (Ft+Fs)/m

Couplings
  intop1: Integration on domains 3, 4 | opname = int_obj; frame = mesh
  intop2: Integration on boundaries 6-8, 10-12 | opname = int_bound; frame = mesh
  intop4: Integration on points 5, 8 | opname = intop1; frame = mesh

Probes
  var1: GlobalVariable "Global Variable Probe 1" | expr = vel; unit = m/s; descr = State variable vel; table = default
  var2: GlobalVariable "Global Variable Probe 2" | expr = dis; unit = mm; descr = State variable dis; table = default
  var3: GlobalVariable "Global Variable Probe 3" | expr = m; unit = kg; table = default
  var4: GlobalVariable "Global Variable Probe 4" | probename = Fs1; expr = Fs; unit = N; table = default
  var5: GlobalVariable "Global Variable Probe 5"
    probename = Ft1
    expr = Ft
    unit = mm
    descr = Probe variable Ft
    table = default
  var6: GlobalVariable "Global Variable Probe 6" | expr = abs(dis)<0.000001
  dom1: Domain "Domain Probe 1" on domains 3, 4
    type = maximum
    expr = T
    unit = K
    descr = Temperature
    frame = spatial
    table = default
  var7: GlobalVariable "Global Variable Probe 7" | expr = (abs(vel)<0.0003) && (abs(dis)<0.000001)

Geometry
  geom1 "Geometry 1" (2D, length unit mm)
    r1: Rectangle | base = center; layername = Layer 1; layer = H/2+0.9*h1/2; size = {W, H}
    r2: Rectangle | base = center; layerbottom = off; size = {D, h1}
    fin: Finalize "Form Union"

Materials
  mat1: Common "Air" on domains 1, 2
    def "Basic"
      relpermeability = 1
      relpermittivity = 1
      dynamicviscosity = eta(T[1/K])[Pa*s]
      ratioofspecificheat = 1.4
      electricconductivity = 0[S/m]
      heatcapacity = Cp(T[1/K])[J/(kg*K)]
      density = 1.03
      thermalconductivity = k(T[1/K])[W/(m*K)]
      soundspeed = cs(T[1/K])[m/s]
      eta: Piecewise | arg = T; pieces = {200.0, 1600.0, -8.38278E-7+8.35717342E-8*T^1-7.69429583E-11*T^2+4.6437266E-14*T^3-1.06585607E-17*T^4}
      Cp: Piecewise | arg = T; pieces = {200.0, 1600.0, 1047.63657-0.372589265*T^1+9.45304214E-4*T^2-6.02409443E-7*T^3+1.2858961E-10*T^4}
      rho: Analytic | expr = pA*0.02897/R_const[K*mol/J]/T; args = {pA, T}; dermethod = manual; argders = {{pA, d(pA*0.02897/R_const/T,pA)}, {T, d(pA*0.02897/R_const/T,T)}}
      k: Piecewise | arg = T; pieces = {200.0, 1600.0, -0.00227583562+1.15480022E-4*T^1-7.90252856E-8*T^2+4.11702505E-11*T^3-7.43864331E-15*T^4}
      cs: Analytic | expr = sqrt(1.4*287*T); args = T; dermethod = manual; argders = {T, d(sqrt(1.4*287*T),T)}
    RefractiveIndex
      n = 1
      ki = 0
  mat3: Common "PDMS - Polydimethylsiloxane" on domains 3, 4
    def "Basic"
      thermalexpansioncoefficient = 9e-4[1/K]
      heatcapacity = 1460[J/(kg*K)]
      relpermittivity = 2.75
      density = 970[kg/m^3]
      thermalconductivity = 0.16[W/(m*K)]
    Enu "Young's modulus and Poisson's ratio"
      youngsmodulus = 750[kPa]
      poissonsratio = 0.49
  mat6: Common "KF96L-20" on domains 1
    def "Basic"
      thermalconductivity = 0.15
      density = 950
      heatcapacity = 1632
      ratioofspecificheat = 1
      dynamicviscosity = 1.90E-02
  mat5: Common "Novec 7500" on domains 1
    def "Basic"
      density = 1614
      dynamicviscosity = 0.00124278
      heatcapacity = 1128
      ratioofspecificheat = 1
      thermalconductivity = 0.065
  mat4: Common "fc-40" on domains 1
    def "Basic"
      dynamicviscosity = 4.1E-3
      thermalconductivity = 0.065
      heatcapacity = 1100
      ratioofspecificheat = 1
      density = 1855
  mat2: Common "Water, liquid" on domains 1
    def "Basic"
      dynamicviscosity = eta(T[1/K])[Pa*s]
      ratioofspecificheat = 1.0
      electricconductivity = 5.5e-6[S/m]
      heatcapacity = Cp(T[1/K])[J/(kg*K)]
      density = rho(T[1/K])[kg/m^3]
      thermalconductivity = k(T[1/K])[W/(m*K)]
      soundspeed = cs(T[1/K])[m/s]
      eta: Piecewise
        arg = T
        pieces = 
          {273.15, 413.15, 1.3799566804-0.021224019151*T^1+1.3604562827E-4*T^2-4.6454090319E-7*T^3+8.9042735735E-10*T^4-9.0790692686E-13*T^5+3.8457331488E-16*T^6}
          {413.15, 553.75, 0.00401235783-2.10746715E-5*T^1+3.85772275E-8*T^2-2.39730284E-11*T^3}
      Cp: Piecewise | arg = T; pieces = {273.15, 553.75, 12010.1471-80.4072879*T^1+0.309866854*T^2-5.38186884E-4*T^3+3.62536437E-7*T^4}
      rho: Piecewise | arg = T; pieces = {273.15, 553.75, 838.466135+1.40050603*T^1-0.0030112376*T^2+3.71822313E-7*T^3}
      k: Piecewise | arg = T; pieces = {273.15, 553.75, -0.869083936+0.00894880345*T^1-1.58366345E-5*T^2+7.97543259E-9*T^3}
      cs: Interpolation | table = {{273, 1403}, {278, 1427}, {283, 1447}, {293, 1481}, {303, 1507}, {313, 1526}, {323, 1541}, {333, 1552}, {343, 1555}, {353, 1555}, {363, 1550}, {373, 1543}}; interp = piecewisecubic
  mat8: Common "fc-70" on domains 1
    def "Basic"
      dynamicviscosity = 24E-3
      thermalconductivity = 0.070
      heatcapacity = 1100
      ratioofspecificheat = 1
      density = 1940
  mat10: Common "Novec 7200" on domains 1
    def "Basic"
      density = 1430
      dynamicviscosity = 6.1e-4
      heatcapacity = 1214
      ratioofspecificheat = 1
      thermalconductivity = 0.068
  mat9: Common "decane" on domains 1
    def "Basic"
      dynamicviscosity = 8.48E-4
      thermalconductivity = 0.147
      heatcapacity = 2217
      ratioofspecificheat = 1
      density = 730
  mat7: Common "KF96L-5" on domains 1
    def "Basic"
      thermalconductivity = 0.12
      density = 915
      heatcapacity = 1758
      ratioofspecificheat = 1
      dynamicviscosity = 4.58E-03

Physics
  ht: HeatTransferInSolidsAndFluids "Heat Transfer" on domains 1-4
    dependent variable T
    ShapeProperty.order_temperature = 1
    PhysicalModelProperty.dz = D
    PhysicalModelProperty.HeatTransferInBiologicalTissue = 0
    PhysicalModelProperty.IsothermalDomain = 1
    solid1: SolidHeatTransferModel "Solid 1" (default)
    fluid1: FluidHeatTransferModel "Fluid 1" on domains 2 | minput_velocity_src = root.comp1.u
    init1: init "Initial Values 1" (default)
    ins1: ThermalInsulation (default)
    idi1: IsothermalDomainInterface (default)
    fluid2: FluidHeatTransferModel "Fluid 2" on domains 1 | minput_velocity_src = root.comp1.u
    bhs1: BoundaryHeatSource on boundaries 10
      heatSourceType = GeneralSource
      Pb = Q_full
      Qb = power_dens*(rectl(x/1[m])+rectr(x/1[m]))*step1(t/1[s])
  tpfmm: LaminarTwoPhaseFlowMovingMesh on domains 1, 2
    dependent variable u = {u, v, w}
    dependent variable p
    ShapeProperty.order_fluid = 2
    CompressibilityProperty.Compressibility = Incompressible
    StokesFlowProp.StokesFlowProp = 0
    FrameSettings.geometryShapeOrder = 2
    free1: FreeDeformation (default)
    disp1: PrescribedMeshDisplacement (default) | dx = {dis, 0}
    wall1: Wall (default)
    fp1: FluidProperties on domains 1, 2
    init1: init "Initial Values 1" (default)
    wall4: Wall on boundaries 1, 3, 4, 6-15 | BoundaryCondition = MovingWall; uwall = {-vel, 0, 0}; uvw = -vel
    ns1: NavierSlip on boundaries 1, 3, 14, 15 | beta = 0.1*h/10; BoundaryCondition = NormalWallVelocity; nwallv = 0
    fp2: FluidProperties on domains 1 | rho_mat = from_mat
    disp2: PrescribedMeshDisplacement on boundaries 1, 3, 6, 8, 9, 11, 12, 14, 15 | useDx = {1, 0}; dx = {dis, 0}
    disp3: PrescribedMeshDisplacement on boundaries 2, 5, 9 | dx = {0, 0}
    disp4: PrescribedMeshDisplacement on boundaries 1, 3, 14, 15 | useDx = {1, 0}
    init2: init "Initial Values 2" on all domains | p = 1[atm]
    ffi1: FluidFluidInterface on boundaries 4, 13 | ReverseNormal = 0; sigma = kf5_s0-kf5_c*(T-273.15[K])
      wfi1: WallFluidInterface on all points
    prpc1: PressurePointConstraint on points 3, 12 | p0 = 1[atm]
    vf1: VolumeForce on domains 1, 2 | F = {0, -g_const*tpfmm.rho, 0}
  ge: GlobalEquations "Global ODEs and DAEs"
    ge1: GlobalEquations
      name = {vel, }
      equation = {d(vel,t) - (Ft+Fs)/m, }
      initialValueU = {0, 0}
      initialValueUt = {0, 0}
      description = {, }
      valueType = real
      DependentVariableQuantity = velocity
      CustomDependentVariableUnit = 1
      SourceTermQuantity = acceleration
      CustomSourceTermUnit = m
    ge2: GlobalEquations
      name = dis
      equation = vel - d(dis,t)
      initialValueU = -x0
      initialValueUt = 0
      valueType = real
      DependentVariableQuantity = displacement
      CustomDependentVariableUnit = m/s
      SourceTermQuantity = velocity
      CustomSourceTermUnit = m
  ale: MovingMesh on domains 3, 4
    fix1: FixedMesh (default)
    disp1: PrescribedMeshDisplacement (default) | useDx = {1, 1}
    pres1: PrescribedDeformation on domains 3, 4 | dx = {dis, 0}
  ev: Events on all domains

Mesh
  mesh1 "Mesh 1" (physics-controlled)
  mesh6 "Mesh 6" (physics-controlled)

Studies
  std2 "Study 2"
    batsw: BatchSweep
      sweeptype = filled
      pname = {x0, Q_full}
      plistarr = {"90E-6, 75e-6, 60e-6, 45e-6, 30e-6", "1e-4, 5e-4, 1e-3, 5e-3, 1e-2"}
      punit = {m, W}
      accumtable = new
      batchfile = 2d_controllability.mph
      synchsolutions = on
      savefile = on
      maxallow = 8
    time: Transient "Time Dependent" | tlist = range(0,0.001,tmax); mesh = {geom1, mesh1}