// COMSOL Multiphysics 5.3.1.275 model "sweeps_silicon_oil_upper_phase.mph"
// Outline of the model tree

Parameters
  scale = 1
  scale_volume = 2*scale
  scale_object = scale
  H = 3[mm]*scale_volume  // ""
  W = 7.5[mm]*scale_volume  // ""
  h1 = 80e-3[mm]*scale_object  // ""
  diam = 300e-3[mm]*scale_object  // ""
  delta_r_beam = 30E-3[mm]*scale_object
  L = W  // ""
  T0 = 298.15[K]  // ""
  Q_full = 0.5[mW]  // ""
  rho0 = 1909[kg/m^3]  // ""
  r_beam = diam/2-50e-6[m]  // ""
  s_oil = 5.811[mN/m]
  c_oil = 0.0382[mN/m/K]
  thermal_conductivity = 0.067[W/m/K]
  viscosity = 4.1E-3[Pa*s]
  Cp = 1050[J/kg/K]  // Parametric sweep value
  RHO = 1870[kg/m^3]

Variables
  var1 "Variables 1"
    total_force_x = bnd1+edge1
    conduct_vs_convect = mat4.def.k_iso/Vc/lc/mat4.def.Cp/mat4.def.rho
    lc = (h1+diam)/2
    Re = RHO*lc*Vc/viscosity
    Fr = Vc*Vc/g_const/lc
    Pr = Cp*viscosity/thermal_conductivity
    Ma = c/viscosity/thermal_conductivity*Cp*RHO
    mu_rho = viscosity/mat4.def.rho

Selections
  sel1: Explicit "detail" on boundaries 11-15, 17, 21, 22, 25, 30, 31, 34, 35

Probes
  dom1: Domain "V_max" on domains 1
    type = maximum
    probename = Vc
    expr = tpfmm.U
    unit = m/s
    descr = Velocity magnitude
    frame = spatial
    table = default
  bnd1: Boundary "F_stress" on selection sel1
    type = integral
    expr = tpfmm.T_stressx
    unit = N
    descr = Total stress, x component
    frame = spatial
    table = default
  edge1: Edge "F_sigma" on edges 21, 22, 56, 67
    type = integral
    expr = root.nx*tpfmm.sigma
    unit = N
    frame = spatial
    table = default
  var1: GlobalVariable "Total_force" | probename = tot_force; expr = total_force_x; unit = N; table = default
  var5: GlobalVariable "Re" | probename = Re1; expr = Re; table = default

Geometry
  geom1 "Geometry 1" (3D, length unit mm)
    cyl1: Cylinder
      ax2 = {0.0, 0.0}
      layername = Layer 1
      layer = H/2-0.9*h1/2
      layerside = off
      layerbottom = on
      r = W/2
      h = H
    cyl2: Cylinder | pos = {0, 0, H/2-h1/2}; ax2 = {0.0, 0.0}; layerside = off; r = diam/2; h = h1
    cyl3: Cylinder
      pos = {0, 0, H/2+h1/2}
      type = surface
      ax2 = {0.0, 0.0}
      layername = Layer 1
      layer = H/2-0.98*h1
      layerside = off
      r = diam/2 -delta_r_beam
      h = 1e-2
    cyl4: Cylinder
      pos = {-diam/2, 0, H/2+h1/2}
      type = surface
      ax2 = {0.0, 0.0}
      layername = Layer 1
      layer = H/2
      layerside = off
      r = diam/2*0.8
      h = 1e-2
    fin: Finalize "Form Union"

Materials
  mat3: Common "PDMS - Polydimethylsiloxane" on domains 3, 4
    def "Basic"
      thermalexpansioncoefficient = 9e-4[1/K]
      heatcapacity = 1460[J/(kg*K)]
      relpermittivity = 2.75
      density = 970[kg/m^3]
      thermalconductivity = 0.16[W/(m*K)]
    Enu "Young's modulus and Poisson's ratio"
      youngsmodulus = 750[kPa]
      poissonsratio = 0.50
  mat4: Common "fc-40" on domains 1
    def "Basic"
      dynamicviscosity = 4.1E-3
      density = 1870
      thermalconductivity = 0.067
      heatcapacity = 1050
      ratioofspecificheat = 1
  mat5: Common "KF96L-5" on domains 2
    def "Basic"
      thermalconductivity = 0.12
      density = 915
      heatcapacity = 1758
      ratioofspecificheat = 1
      dynamicviscosity = 4.58E-3

Physics
  tpfmm: LaminarTwoPhaseFlowMovingMesh on domains 1, 2
    dependent variable u = {u, v, w}
    CompressibilityProperty.Compressibility = Incompressible
    pref.pref = 1[atm]
    free1: FreeDeformation (default)
    disp1: PrescribedMeshDisplacement (default)
    wall1: Wall (default)
    fp1: FluidProperties (default)
      rho_mat = from_mat
      mu_mat = userdef
      mu = viscosity
      minput_temperature_src = root.comp1.T
    init1: init "Initial Values 1" (default) | u = {1E-6, 0, 0}; p = 0
    fp2: FluidProperties on domains 2 | rho_mat = from_mat; mu_mat = from_mat; minput_temperature_src = root.comp1.T
    vf1: VolumeForce on domains 1, 2 | F = {0, 0, -g_const*tpfmm.rho}
    ns1: NavierSlip on boundaries 11, 12, 14, 15, 30, 31, 34, 35 | beta = 0.2*h/10
    ns2: NavierSlip (disabled) on boundaries 1, 2, 4, 5, 28, 29, 36, 37 | beta = 0.2*h/10
    ffi1: FluidFluidInterface on boundaries 6, 16
      sigma = s_oil-c_oil*(T-273.15[K])
      SurfaceTensionCoefficient = userdef
      ReverseNormal = 1
      wfi1: WallFluidInterface on all edges | thetac = pi/2
    disp2: PrescribedMeshDisplacement on boundaries 1, 2, 4, 5, 11, 12, 14, 15, 28-31, 34-37 | useDx = {1, 1, 0}
    prpc1: PressurePointConstraint on points 3 | p0 = 1
    disp3: PrescribedMeshDisplacement on boundaries 1, 2, 4, 5, 28, 29, 36, 37 | useDx = {1, 1, 0}
    open1: OpenBoundary (disabled) on boundaries 3, 7
  ht: HeatTransferInSolidsAndFluids "Heat Transfer" on all domains
    dependent variable T
    ShapeProperty.order_temperature = 1
    AmbientSettings.p_amb = 0[atm]
    solid1: SolidHeatTransferModel "Heat Transfer in Solids 1" (default)
    fluid1: FluidHeatTransferModel "Heat Transfer in Fluids 1" on domains 2
      rho_mat = from_mat
      minput_velocity_src = root.comp1.u
    init1: init "Initial Values 1" (default)
    ins1: ThermalInsulation (default)
    bhs1: BoundaryHeatSource on boundaries 17 | heatSourceType = HeatRate; Pb = Q_full
    temp1: TemperatureBoundary "Temperature 1" on boundaries 1-5, 7, 28, 29, 36, 37
    fluid2: FluidHeatTransferModel "Heat Transfer in Fluids 2" on domains 1
      multiplyConductivityByNu = 0
      k_mat = userdef
      k = thermal_conductivity
      rho_mat = from_mat
      Cp_mat = userdef
      Cp = Cp
      gamma_mat = from_mat
      minput_velocity_src = root.comp1.u

Mesh
  mesh1 "Mesh 1" (physics-controlled)
  mesh2 "Mesh 2"
    size: MeshSizeDefault | hmax = 0.7; hmin = 0.008; hgrad = 1.5; hauto = 1; custom = on
    size1: Size on domains 1, 2 | hauto = 7
    size2: Size on boundaries 1-5, 7, 13, 17, 21, 22, 25, 28, 29, 36, 37
      table = cfd
      hmax = 1.9
      hmin = 0.474
      hcurve = 0.9
      hnarrow = 0.4
      hgrad = 1.3
      hauto = 8
    ftet1: FreeTet "Free Tetrahedral 1" on remaining entities

Studies
  std4 "Power Sweep Study"
    param: Parametric "Power Sweep" | pname = Q_full; plistarr = 0.035 0.05 0.07 0.1 0.5 1 2.5 5; punit = mW
    time: Transient "Time Dependent" | tlist = range(0,0.01,0.5)